<?xml version="1.0"?>
<?xml-stylesheet type="text/xsl" href="http://jsbsim.sourceforge.net/JSBSim.xsl"?>
<fdm_config name="DC3" version="2.0" release="ALPHA"
   xmlns:xsi="http://www.w3.org/2001/XMLSchema-instance"
   xsi:noNamespaceSchemaLocation="http://jsbsim.sourceforge.net/JSBSim.xsd">

 <fileheader>
  <author> Aeromatic v 0.95, OOZVY and dany93 </author>
  <filecreationdate> 2015-01-15 </filecreationdate>
  <version>$Revision: 2015-01-15 $</version>
  <description> Models a Basler BT-76. </description>
 </fileheader>

<!--
  File:     DC3.xml
  Inputs:
    name:          DC3
    type:          multi-engine prop transport
    max weight:    25247.25 lb
    wing span:     95.149 ft
    length:        64.6357 ft
    wing area:     unspecified
    gear type:     taildragger
    retractable?:  yes
    # engines:     2
    engine type:   piston
    engine layout: wings
    yaw damper?    yes
  Outputs:
    wing loading:  57.00 lb/sq-ft
    CL-alpha:      4.9 per radian
    CL-0:          0.24
    CL-max:        1.4
    CD-0:          0.025
    K:             0.039

-->

 <metrics>
   <wingarea  unit="FT2">       987 </wingarea>
   <wingspan  unit="FT" >       95.15 </wingspan>
   <wing_incidence unit="DEG">  2.00 </wing_incidence>
   <chord     unit="FT" >       11.5 </chord>
   <htailarea unit="FT2">       70.87 </htailarea>
   <htailarm  unit="FT" >       32.32 </htailarm>
   <vtailarea unit="FT2">       79.73 </vtailarea>
   <vtailarm  unit="FT" >       32.32 </vtailarm>
   <location name="AERORP" unit="IN">
     <x> 250.9 </x>
     <y>   0.00 </y>
     <z>   0.00 </z>
   </location>
   <location name="EYEPOINT" unit="IN">
     <x>  62.05 </x>
     <y> -24.00 </y>
     <z>  65.00 </z>
   </location>
   <location name="VRP" unit="IN">
     <x>387.81</x>
     <y>0</y>
     <z>0</z>
   </location>
 </metrics>

 <mass_balance>
   <ixx unit="SLUG*FT2">    109033 </ixx>
   <iyy unit="SLUG*FT2">     60191 </iyy>
   <izz unit="SLUG*FT2">    165827 </izz>
   <emptywt unit="LBS" >     17200 </emptywt>
   <location name="CG" unit="IN">
     <x> 245.2 </x>
     <y>   0.00 </y>
     <z> -19.39 </z>
   </location>

    <pointmass name="COMPARTMENT_A">
      <weight unit="LBS">0</weight>
      <location name="POINTMASS" unit="IN">
        <x> 70 </x>
        <y> 0 </y>
        <z>  0 </z>
      </location>
    </pointmass>

    <pointmass name="COMPARTMENT_B">
      <weight unit="LBS">0</weight>
      <location name="POINTMASS" unit="IN">
        <x> 115 </x>
        <y> 0 </y>
        <z>  0 </z>
      </location>
    </pointmass>

    <pointmass name="COMPARTMENT_C">
      <weight unit="LBS">0</weight>
      <location name="POINTMASS" unit="IN">
        <x> 154 </x>
        <y> 0 </y>
        <z>  0 </z>
      </location>
    </pointmass>

    <pointmass name="COMPARTMENT_D">
      <weight unit="LBS">0</weight>
      <location name="POINTMASS" unit="IN">
        <x> 226 </x>
        <y> 0 </y>
        <z>  0 </z>
      </location>
    </pointmass>

    <pointmass name="COMPARTMENT_E">
      <weight unit="LBS">0</weight>
      <location name="POINTMASS" unit="IN">
        <x> 323 </x>
        <y> 0 </y>
        <z>  0 </z>
      </location>
    </pointmass>

    <pointmass name="COMPARTMENT_F">
      <weight unit="LBS">0</weight>
      <location name="POINTMASS" unit="IN">
        <x> 411 </x>
        <y> 0 </y>
        <z>  0 </z>
      </location>
    </pointmass>

    <pointmass name="COMPARTMENT_G">
      <weight unit="LBS">0</weight>
      <location name="POINTMASS" unit="IN">
        <x> 493 </x>
        <y> 0 </y>
        <z>  0 </z>
      </location>
    </pointmass>

    <pointmass name="COMPARTMENT_H">
      <weight unit="LBS">0</weight>
      <location name="POINTMASS" unit="IN">
        <x> 569 </x>
        <y> 0 </y>
        <z>  0 </z>
      </location>
    </pointmass>

 </mass_balance>

 <ground_reactions>

  <contact type="BOGEY" name="LEFT_MAIN">
   <location unit="IN">
     <x> 220 </x>
     <y> -111 </y>
     <z> -142.5 </z>
   </location>
   <static_friction>  0.40 </static_friction>
   <dynamic_friction> 0.50 </dynamic_friction>
   <rolling_friction> 0.02 </rolling_friction>
   <spring_coeff unit="LBS/FT">      30000 </spring_coeff>
   <damping_coeff unit="LBS/FT/SEC">  7500 </damping_coeff>
   <max_steer unit="DEG">0</max_steer>
   <brake_group>LEFT</brake_group>
   <retractable>1</retractable>
  </contact>

  <contact type="BOGEY" name="RIGHT_MAIN">
   <location unit="IN">
     <x> 220 </x>
     <y> 111 </y>
     <z> -142.5 </z>
   </location>
   <static_friction>  0.40 </static_friction>
   <dynamic_friction> 0.50 </dynamic_friction>
   <rolling_friction> 0.02 </rolling_friction>
   <spring_coeff unit="LBS/FT">      30000 </spring_coeff>
   <damping_coeff unit="LBS/FT/SEC">  7500 </damping_coeff>
   <max_steer unit="DEG">0</max_steer>
   <brake_group>RIGHT</brake_group>
   <retractable>1</retractable>
  </contact>

  <contact type="BOGEY" name="TAIL">
   <location unit="IN">
     <x> 705.82 </x>
     <y>   0.00 </y>
     <z> -42.5 </z>
   </location>
   <static_friction>  0.80 </static_friction>
   <dynamic_friction> 0.50 </dynamic_friction>
   <rolling_friction> 0.05 </rolling_friction>
   <spring_coeff unit="LBS/FT"> 16200 </spring_coeff>
   <damping_coeff unit="LBS/FT/SEC"> 4000 </damping_coeff>
   <damping_coeff_rebound unit="LBS/FT/SEC">2500</damping_coeff_rebound>
   <steerability> STEERABLE </steerability>
   <max_steer unit="DEG"> 360 </max_steer>
   <brake_group>NONE</brake_group>
   <retractable>0</retractable>
  </contact>

  <contact type="STRUCTURE" name="TAIL">
   <location unit="IN">
     <x> 751 </x>
     <y>   0.00 </y>
     <z> 0 </z>
   </location>
   <static_friction>  0.02 </static_friction>
   <dynamic_friction> 0.02 </dynamic_friction>
   <spring_coeff unit="LBS/FT"> 30000 </spring_coeff>
   <damping_coeff unit="LBS/FT/SEC"> 2500 </damping_coeff>
  </contact>

   <contact type="STRUCTURE" name="NOSE">
   <location unit="IN">
     <x> 20 </x>
     <y>   0.00 </y>
     <z> -33 </z>
   </location>
   <static_friction>  0.02 </static_friction>
   <dynamic_friction> 0.02 </dynamic_friction>
   <spring_coeff unit="LBS/FT"> 30000 </spring_coeff>
   <damping_coeff unit="LBS/FT/SEC"> 2500 </damping_coeff>
  </contact>

   <contact type="STRUCTURE" name="BELLY">
   <location unit="IN">
     <x> 360 </x>
     <y>   0 </y>
     <z> -70 </z>
   </location>
   <static_friction>  0.02 </static_friction>
   <dynamic_friction> 0.02 </dynamic_friction>
   <spring_coeff unit="LBS/FT"> 30000 </spring_coeff>
   <damping_coeff unit="LBS/FT/SEC"> 2500 </damping_coeff>
   </contact>

   <contact type="STRUCTURE" name="L_ENGINE">
   <location unit="IN">
     <x> 180 </x>
     <y>   -111 </y>
     <z> -90 </z>
   </location>
   <static_friction>  0.02 </static_friction>
   <dynamic_friction> 0.02 </dynamic_friction>
   <spring_coeff unit="LBS/FT"> 30000 </spring_coeff>
   <damping_coeff unit="LBS/FT/SEC"> 2500 </damping_coeff>
   </contact>

   <contact type="STRUCTURE" name="R_ENGINE">
   <location unit="IN">
     <x> 180 </x>
     <y>   111 </y>
     <z> -90 </z>
   </location>
   <static_friction>  0.02 </static_friction>
   <dynamic_friction> 0.02 </dynamic_friction>
   <spring_coeff unit="LBS/FT"> 30000 </spring_coeff>
   <damping_coeff unit="LBS/FT/SEC"> 2500 </damping_coeff>
  </contact>

  <contact type="STRUCTURE" name="LEFT_WING">
    <location unit="IN">
     <x> 330.81 </x>
     <y> -567.7 </y>
     <z> -6.69 </z>
    </location>
    <static_friction>  0.02 </static_friction>
    <dynamic_friction> 0.02 </dynamic_friction>
    <spring_coeff unit="LBS/FT"> 30000 </spring_coeff>
    <damping_coeff unit="LBS/FT/SEC"> 2500 </damping_coeff>
    <damping_coeff_rebound unit="LBS/FT/SEC">2500</damping_coeff_rebound>
  </contact>

  <contact type="STRUCTURE" name="RIGHT_WING">
    <location unit="IN">
     <x> 330.81 </x>
     <y> 567.7 </y>
     <z> -6.69 </z>
    </location>
    <static_friction>  0.02 </static_friction>
    <dynamic_friction> 0.02 </dynamic_friction>
    <spring_coeff unit="LBS/FT">      30000 </spring_coeff>
    <damping_coeff unit="LBS/FT/SEC">  2500 </damping_coeff>
  </contact>

 </ground_reactions>

 <propulsion>

   <engine file="BT67_engine">
    <location unit="IN">
      <x> 136 </x>
      <y> -110.30 </y>
      <z> -27.00 </z>
    </location>
    <orient unit="DEG">
      <pitch> 0.00 </pitch>
      <roll>   0.00 </roll>
      <yaw>   0.00 </yaw>
    </orient>
    <feed>4</feed>
    <thruster file="BT67_prop">
     <location unit="IN">
       <x> 136 </x>
       <y> -110.30 </y>
       <z> -27.00 </z>
     </location>
     <orient unit="DEG">
       <pitch> 0.00 </pitch>
       <roll>   0.00 </roll>
       <yaw>   0.00 </yaw>
     </orient>
    </thruster>
  </engine>

   <engine file="BT67_engine">
    <location unit="IN">
      <x> 136 </x>
      <y> 110.30 </y>
      <z> -27.00 </z>
    </location>
    <orient unit="DEG">
      <pitch> 0.00 </pitch>
      <roll>   0.00 </roll>
      <yaw>   0.00 </yaw>
    </orient>
    <feed>5</feed>
    <thruster file="BT67_prop">
     <location unit="IN">
       <x> 136 </x>
       <y> 110.30 </y>
       <z> -27.00 </z>
     </location>
     <orient unit="DEG">
       <pitch> 0.00 </pitch>
       <roll>   0.00 </roll>
       <yaw>   0.00 </yaw>
     </orient>
    </thruster>
  </engine>

  <tank type="FUEL" number="0">
     <location unit="IN">
       <x> 275.9 </x>
       <y> 200 </y>
       <z> -34 </z>
     </location>
     <capacity unit="LBS"> 1202 </capacity>
     <contents unit="LBS"> 600 </contents>
  </tank>

  <tank type="FUEL" number="1">
     <location unit="IN">
       <x> 245 </x>
       <y> 200 </y>
       <z> -34 </z>
     </location>
     <capacity unit="LBS"> 1210 </capacity>
     <contents unit="LBS"> 600 </contents>
  </tank>

  <tank type="FUEL" number="2">
     <location unit="IN">
       <x> 245 </x>
       <y> -200 </y>
       <z> -34 </z>
     </location>
     <capacity unit="LBS"> 1210 </capacity>
     <contents unit="LBS"> 600 </contents>
  </tank>

  <tank type="FUEL" number="3">
     <location unit="IN">
       <x> 275.9 </x>
       <y> -200 </y>
       <z> -34 </z>
     </location>
     <capacity unit="LBS"> 1202 </capacity>
     <contents unit="LBS"> 600 </contents>
  </tank>

  <tank type="FUEL" number="4">
     <!-- Collector Tank (left engine) -->
     <location unit="IN">
       <x> 245 </x>
       <y> -200 </y>
       <z> -34 </z>
     </location>
     <capacity unit="LBS"> 0.5 </capacity>
     <contents unit="LBS"> 0 </contents>
  </tank>

  <tank type="FUEL" number="5">
     <!-- Collector Tank (right engine) -->
     <location unit="IN">
       <x> 245 </x>
       <y> 200 </y>
       <z> -34 </z>
     </location>
     <capacity unit="LBS"> 0.5 </capacity>
     <contents unit="LBS"> 0 </contents>
  </tank>

 </propulsion>

 <flight_control name="FCS: DC3">

  <channel name="Pitch">
   <summer name="Pitch Trim Sum">
      <input>fcs/elevator-cmd-norm</input>
      <input>fcs/pitch-trim-cmd-norm</input>
      <clipto>
        <min> -1 </min>
        <max>  1 </max>
      </clipto>
   </summer>

   <aerosurface_scale name="Elevator Control">
      <input>fcs/pitch-trim-sum</input>
      <range>
        <min> -0.25 </min>
        <max>  0.25 </max>
      </range>
      <output>fcs/elevator-pos-rad</output>
   </aerosurface_scale>

   <aerosurface_scale name="elevator normalization">
      <input>fcs/elevator-pos-rad</input>
      <domain>
        <min> -0.25 </min>
        <max>  0.25 </max>
      </domain>
      <range>
        <min> -1 </min>
        <max>  1 </max>
      </range>
      <output>fcs/elevator-pos-norm</output>
   </aerosurface_scale>

  </channel>

  <channel name="Roll">
   <summer name="Roll Trim Sum">
      <input>fcs/aileron-cmd-norm</input>
      <input>fcs/roll-trim-cmd-norm</input>
      <clipto>
        <min> -1 </min>
        <max>  1 </max>
      </clipto>
   </summer>

   <aerosurface_scale name="Left Aileron Control">
      <input>fcs/roll-trim-sum</input>
      <range>
        <min> -0.25 </min>
        <max>  0.25 </max>
      </range>
      <output>fcs/left-aileron-pos-rad</output>
   </aerosurface_scale>

   <aerosurface_scale name="Right Aileron Control">
      <input>fcs/roll-trim-sum</input>
      <range>
        <min> -0.25 </min>
        <max>  0.25 </max>
      </range>
      <output>fcs/right-aileron-pos-rad</output>
   </aerosurface_scale>

   <aerosurface_scale name="left aileron normalization">
      <input>fcs/left-aileron-pos-rad</input>
      <domain>
        <min> -0.25 </min>
        <max>  0.25 </max>
      </domain>
      <range>
        <min> -1 </min>
        <max>  1 </max>
      </range>
      <output>fcs/left-aileron-pos-norm</output>
   </aerosurface_scale>

   <aerosurface_scale name="right aileron normalization">
      <input>fcs/right-aileron-pos-rad</input>
      <domain>
        <min> -0.25 </min>
        <max>  0.25 </max>
      </domain>
      <range>
        <min> 1 </min>
        <max>  -1 </max>
      </range>
      <output>fcs/right-aileron-pos-norm</output>
   </aerosurface_scale>

  </channel>

  <channel name="Yaw">
   <summer name="Rudder Command Sum">
      <input>fcs/rudder-cmd-norm</input>
      <input>fcs/yaw-trim-cmd-norm</input>
      <clipto>
        <min> -0.35 </min>
        <max>  0.35 </max>
      </clipto>
   </summer>

   <scheduled_gain name="Yaw Damper Rate">
      <input>velocities/r-aero-rad_sec</input>
      <table>
        <independentVar lookup="row">velocities/ve-kts</independentVar>
         <tableData>
            30     0.00
            60     2.00
         </tableData>
      </table>
   </scheduled_gain>

   <scheduled_gain name="Yaw Damper Beta">
      <input>aero/beta-rad</input>
      <table>
        <independentVar lookup="row">velocities/ve-kts</independentVar>
        <tableData>
           30     0.00
           60     0.00
        </tableData>
      </table>
   </scheduled_gain>

   <summer name="Yaw Damper Sum">
      <input>fcs/yaw-damper-beta</input>
      <input>fcs/yaw-damper-rate</input>
      <clipto>
        <min> -0.1 </min>
        <max>  0.1 </max>
      </clipto>
   </summer>

   <scheduled_gain name="Yaw Damper Final">
      <input>fcs/yaw-damper-sum</input>
      <table>
        <independentVar lookup="row">velocities/ve-kts</independentVar>
        <tableData>
           30         0.0
           31         1.0
        </tableData>
      </table>
   </scheduled_gain>

   <summer name="Rudder Sum">
      <input>fcs/rudder-command-sum</input>
      <input>fcs/yaw-damper-final</input>
      <clipto>
        <min> -1 </min>
        <max>  1 </max>
      </clipto>
   </summer>

   <aerosurface_scale name="Rudder Control">
      <input>fcs/rudder-sum</input>
      <range>
        <min> -0.35 </min>
        <max>  0.35 </max>
      </range>
      <output>fcs/rudder-pos-rad</output>
   </aerosurface_scale>

   <aerosurface_scale name="rudder normalization">
      <input>fcs/rudder-pos-rad</input>
      <domain>
        <min> -0.35 </min>
        <max>  0.35 </max>
      </domain>
      <range>
        <min> 1 </min>
        <max>  -1 </max>
      </range>
      <output>fcs/rudder-pos-norm</output>
   </aerosurface_scale>

  </channel>

  <channel name="Flaps">
   <kinematic name="Flaps Control">
     <input>fcs/flap-cmd-norm</input>
     <traverse>
       <setting>
          <position>  0 </position>
          <time>      0 </time>
       </setting>
        <setting>
          <position>  7 </position>
          <time>      4 </time>
       </setting>
       <setting>
          <position> 15 </position>
          <time>      4 </time>
       </setting>
       <setting>
          <position>  22 </position>
          <time>      3 </time>
       </setting>
       <setting>
          <position> 30 </position>
          <time>      3 </time>
       </setting>
     </traverse>
     <output>fcs/flap-pos-deg</output>
   </kinematic>

   <aerosurface_scale name="flap normalization">
      <input>fcs/flap-pos-deg</input>
      <domain>
        <min>  0 </min>
        <max> 30 </max>
      </domain>
      <range>
        <min> 0 </min>
        <max> 1 </max>
      </range>
      <output>fcs/flap-pos-norm</output>
   </aerosurface_scale>

  </channel>

  <channel name="Landing Gear">
   <kinematic name="Gear Control">
     <input>gear/gear-cmd-norm</input>
     <traverse>
       <setting>
          <position> 0 </position>
          <time>     0 </time>
       </setting>
       <setting>
          <position> 1 </position>
          <time>     5 </time>
       </setting>
     </traverse>
     <output>gear/gear-pos-norm</output>
   </kinematic>

  </channel>

  <channel name="Speedbrake">
   <kinematic name="Speedbrake Control">
     <input>fcs/speedbrake-cmd-norm</input>
     <traverse>
       <setting>
          <position> 0 </position>
          <time>     0 </time>
       </setting>
       <setting>
          <position> 1 </position>
          <time>     1 </time>
       </setting>
     </traverse>
     <output>fcs/speedbrake-pos-norm</output>
   </kinematic>

  </channel>

 </flight_control>

 <aerodynamics>

    <function name="aero/thrust-qbar_psf">
      <description>Dynamic_pressure_including_backwash</description>
      <product>
        <v> 0.5 </v>
        <p> atmosphere/rho-slugs_ft3 </p>
        <pow>
          <sum>
            <p> velocities/u-aero-fps </p>
            <product>
              <sum>
                <p> propulsion/engine/prop-induced-velocity_fps </p>
                <p> propulsion/engine[1]/prop-induced-velocity_fps </p>
              </sum>
              <v> 0.5 </v>
            </product>
          </sum>
          <v> 2 </v>
        </pow>
      </product>
    </function>

    <function name="aero/function/kCDge">
      <description>Change_in_drag_due_to_ground_effect</description>
      <product>
        <table>
          <independentVar>aero/h_b-mac-ft</independentVar>
          <tableData>
            0.0000   0.0480
            0.1000   0.5150
            0.1500   0.6290
            0.2000   0.7090
            0.3000   0.8150
            0.4000   0.8820
            0.5000   0.9280
            0.6000   0.9620
            0.7000   0.9880
            0.8000   1.0000
            0.9000   1.0000
            1.0000   1.0000
            1.1000   1.0000
          </tableData>
        </table>
      </product>
    </function>

    <function name="aero/function/kCLge">
      <description>Change_in_lift_due_to_ground_effect</description>
      <product>
        <table>
          <independentVar>aero/h_b-mac-ft</independentVar>
          <tableData>
            0.0000   1.2030
            0.1000   1.1270
            0.1500   1.0900
            0.2000   1.0730
            0.3000   1.0460
            0.4000   1.0550
            0.5000   1.0190
            0.6000   1.0130
            0.7000   1.0080
            0.8000   1.0060
            0.9000   1.0030
            1.0000   1.0020
            1.1000   1.0000
          </tableData>
        </table>
      </product>
    </function>

  <axis name="LIFT">

    <function name="aero/force/Lift_alpha">
      <description>Lift due to alpha</description>
      <product>
          <property>aero/qbar-psf</property>
          <property>metrics/Sw-sqft</property>
          <property>aero/function/kCLge</property>
          <table>
            <independentVar lookup="row">aero/alpha-wing-rad</independentVar>
            <tableData>
              -0.200    -0.740
               0.000     0.1
               0.120     1.000
               0.180     1.300
               0.240     1.400
               0.300     1.390
               0.400     1.250
               0.500     1.000
               0.600     0.704
            </tableData>
          </table>
      </product>
    </function>

    <function name="aero/force/Lift_flap">
       <description>Delta Lift due to flaps</description>
       <product>
           <property>aero/qbar-psf</property>
           <property>metrics/Sw-sqft</property>
           <property>fcs/flap-pos-deg</property>
           <value> 0.02000 </value>
       </product>
    </function>

    <function name="aero/force/Lift_speedbrake">
       <description>Delta Lift due to speedbrake</description>
       <product>
           <property>aero/qbar-psf</property>
           <property>metrics/Sw-sqft</property>
           <property>fcs/speedbrake-pos-norm</property>
           <value>0</value>
       </product>
    </function>

    <function name="aero/force/Lift_elevator">
       <description>Lift due to Elevator Deflection</description>
       <product>
           <property>aero/qbar-psf</property>
           <property>metrics/Sw-sqft</property>
           <property>fcs/elevator-pos-rad</property>
           <value>0.2</value>
       </product>
    </function>

  </axis>

  <axis name="DRAG">

    <function name="aero/force/Drag_basic">
       <description>Drag due to alpha</description>
       <product>
          <property>aero/qbar-psf</property>
          <property>metrics/Sw-sqft</property>
          <property>aero/function/kCDge</property>
          <table>
            <independentVar lookup="row">aero/alpha-wing-rad</independentVar>
            <tableData>
             -1.57       1.500
             -0.26       0.033
              0.00       0.018
              0.26       0.033
              1.57       1.500
            </tableData>
          </table>
       </product>
    </function>

    <function name="aero/force/Drag_induced">
       <description>Induced drag</description>
         <product>
           <property>aero/qbar-psf</property>
           <property>metrics/Sw-sqft</property>
           <property>aero/cl-squared</property>
           <value>0.039</value>
         </product>
    </function>

    <function name="aero/force/Drag_mach">
       <description>Drag due to mach</description>
        <product>
          <property>aero/qbar-psf</property>
          <property>metrics/Sw-sqft</property>
          <table>
            <independentVar lookup="row">velocities/mach</independentVar>
            <tableData>
                0.00      0.000
                0.7       0.000
                1.10      0.023
                1.80      0.015
            </tableData>
          </table>
        </product>
    </function>

    <function name="aero/force/Drag_flap">
       <description>Drag due to flaps</description>
         <product>
           <property>aero/qbar-psf</property>
           <property>metrics/Sw-sqft</property>
           <property>fcs/flap-pos-deg</property>
           <value> 0.00117 </value>
         </product>
    </function>

    <function name="aero/force/Drag_gear">
       <description>Drag due to gear</description>
         <product>
           <property>aero/qbar-psf</property>
           <property>metrics/Sw-sqft</property>
           <property>gear/gear-pos-norm</property>
           <value>0.023</value>
         </product>
    </function>

    <function name="aero/force/Drag_speedbrake">
       <description>Drag due to speedbrakes</description>
         <product>
           <property>aero/qbar-psf</property>
           <property>metrics/Sw-sqft</property>
           <property>fcs/speedbrake-pos-norm</property>
           <value>0.025</value>
         </product>
    </function>

    <function name="aero/force/Drag_beta">
       <description>Drag due to sideslip</description>
       <product>
          <property>aero/qbar-psf</property>
          <property>metrics/Sw-sqft</property>
          <table>
            <independentVar lookup="row">aero/beta-rad</independentVar>
            <tableData>
              -1.57       1.230
              -0.26       0.050
               0.00       0.000
               0.26       0.050
               1.57       1.230
            </tableData>
          </table>
       </product>
    </function>

    <function name="aero/force/Drag_elevator">
       <description>Drag due to Elevator Deflection</description>
       <product>
           <property>aero/qbar-psf</property>
           <property>metrics/Sw-sqft</property>
           <abs><property>fcs/elevator-pos-norm</property></abs>
           <value>0.04</value>
       </product>
    </function>

  </axis>

  <axis name="SIDE">

    <function name="aero/force/Side_beta">
       <description>Side force due to beta</description>
       <product>
           <property>aero/qbar-psf</property>
           <property>metrics/Sw-sqft</property>
           <property>aero/beta-rad</property>
           <value>-0.5</value>
       </product>
    </function>

  </axis>

  <axis name="ROLL">

    <function name="aero/moment/Roll_beta">
       <description>Roll moment due to beta</description>
       <product>
           <property>aero/qbar-psf</property>
           <property>metrics/Sw-sqft</property>
           <property>metrics/bw-ft</property>
           <property>aero/beta-rad</property>
           <value>-0.06</value>
       </product>
    </function>

    <function name="aero/moment/Roll_damp">
       <description>Roll moment due to roll rate</description>
       <product>
           <property>aero/qbar-psf</property>
           <property>metrics/Sw-sqft</property>
           <property>metrics/bw-ft</property>
           <property>aero/bi2vel</property>
           <property>velocities/p-aero-rad_sec</property>
           <value>-0.4</value>
       </product>
    </function>

    <function name="aero/moment/Roll_yaw">
       <description>Roll moment due to yaw rate</description>
       <product>
           <property>aero/qbar-psf</property>
           <property>metrics/Sw-sqft</property>
           <property>metrics/bw-ft</property>
           <property>aero/bi2vel</property>
           <property>velocities/r-aero-rad_sec</property>
           <value>0.04</value>
       </product>
    </function>

    <function name="aero/moment/Roll_aileron">
       <description>Roll moment due to aileron</description>
       <product>
          <property>aero/qbar-psf</property>
          <property>metrics/Sw-sqft</property>
          <property>metrics/bw-ft</property>
          <property>fcs/left-aileron-pos-rad</property>
          <table>
            <independentVar lookup="row">velocities/mach</independentVar>
            <tableData>
              0.0    0.150
              2.0    0.050
            </tableData>
          </table>
       </product>
    </function>

    <function name="aero/moment/Roll_rudder">
       <description>Roll moment due to rudder</description>
       <product>
           <property>aero/thrust-qbar_psf</property>
           <property>metrics/Sw-sqft</property>
           <property>metrics/bw-ft</property>
           <property>fcs/rudder-pos-rad</property>
           <value>0.03</value>
       </product>
    </function>

  </axis>

  <axis name="PITCH">

    <function name="aero/moment/Pitch_alpha">
       <description>Pitch moment due to alpha</description>
       <product>
           <property>aero/qbar-psf</property>
           <property>metrics/Sw-sqft</property>
           <property>metrics/cbarw-ft</property>
           <property>aero/alpha-rad</property>
           <value>-1</value>
       </product>
    </function>

    <function name="aero/moment/Pitch_elevator">
       <description>Pitch moment due to elevator</description>
       <product>
          <property>aero/thrust-qbar_psf</property>
          <property>metrics/Sw-sqft</property>
          <property>metrics/cbarw-ft</property>
          <property>fcs/elevator-pos-rad</property>
          <table>
            <independentVar lookup="row">velocities/mach</independentVar>
            <tableData>
              0.0     -1.5
              2.0     -0.250
            </tableData>
          </table>
       </product>
    </function>

    <function name="aero/moment/Pitch_damp">
       <description>Pitch moment due to pitch rate</description>
       <product>
           <property>aero/qbar-psf</property>
           <property>metrics/Sw-sqft</property>
           <property>metrics/cbarw-ft</property>
           <property>aero/ci2vel</property>
           <property>velocities/q-aero-rad_sec</property>
           <value>-23</value>
       </product>
    </function>

    <function name="aero/moment/Pitch_alphadot">
       <description>Pitch moment due to alpha rate</description>
       <product>
           <property>aero/qbar-psf</property>
           <property>metrics/Sw-sqft</property>
           <property>metrics/cbarw-ft</property>
           <property>aero/ci2vel</property>
           <property>aero/alphadot-rad_sec</property>
           <value>-8</value>
       </product>
    </function>

  </axis>

  <axis name="YAW">

    <function name="aero/moment/Yaw_beta">
       <description>Yaw moment due to beta</description>
       <product>
           <property>aero/qbar-psf</property>
           <property>metrics/Sw-sqft</property>
           <property>metrics/bw-ft</property>
           <property>aero/beta-rad</property>
           <value>0.12</value>
       </product>
    </function>

    <function name="aero/moment/Yaw_damp">
       <description>Yaw moment due to yaw rate</description>
       <product>
           <property>aero/qbar-psf</property>
           <property>metrics/Sw-sqft</property>
           <property>metrics/bw-ft</property>
           <property>aero/bi2vel</property>
           <property>velocities/r-aero-rad_sec</property>
           <value>-0.15</value>
       </product>
    </function>

    <function name="aero/moment/Yaw_rudder">
       <description>Yaw moment due to rudder</description>
       <product>
           <property>aero/thrust-qbar_psf</property>
           <property>metrics/Sw-sqft</property>
           <property>metrics/bw-ft</property>
           <property>fcs/rudder-pos-rad</property>
           <value>-0.2</value> <!-- -0.15 -->
       </product>
    </function>

    <function name="aero/moment/Yaw_aileron">
       <description>Adverse yaw</description>
       <product>
           <property>aero/qbar-psf</property>
           <property>metrics/Sw-sqft</property>
           <property>metrics/bw-ft</property>
           <property>fcs/left-aileron-pos-rad</property>
           <value>-0.008</value>
       </product>
    </function>

  </axis>

 </aerodynamics>

 <system file="shadow-tweak"/>
 <system file="tail-wheel.xml"/>
 <system file="fuel-jsbsim"/>

</fdm_config>
